*Heading
** Job name: Job-Constrained-Square Model name: Model-1
** Generated by: Abaqus/CAE Learning Edition 2022
*Preprint, echo=NO, model=NO, history=NO, contact=NO
**
** PARTS
**
*Part, name=Part-1
*Node
      1,           0.,           0.,           0.
      2,         0.25,           0.,           0.
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*Element, type=S4
 1,  1,  2,  7,  6
 2,  2,  3,  8,  7
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*Nset, nset=Set-All, generate
  1,  25,   1
*Elset, elset=Set-All, generate
  1,  16,   1
*End Part
**
**
** ASSEMBLY
**
*Assembly, name=Assembly
**
*Instance, name=Part-1-1, part=Part-1
*End Instance
**
*Nset, nset=Set-9, instance=Part-1-1, generate
  1,  25,   1
*Elset, elset=Set-9, instance=Part-1-1, generate
  1,  16,   1
*Nset, nset=Set-10, instance=Part-1-1, generate
 21,  25,   1
*Elset, elset=Set-10, instance=Part-1-1, generate
 13,  16,   1
*Nset, nset=Set-Edge-Bottom, instance=Part-1-1, generate
 1,  5,  1
*Elset, elset=Set-Edge-Bottom, instance=Part-1-1, generate
 1,  4,  1
*Nset, nset=Set-Edge-Left, instance=Part-1-1, generate
  1,  21,   5
*Elset, elset=Set-Edge-Left, instance=Part-1-1, generate
  1,  13,   4
*Nset, nset=Set-Edge-Right, instance=Part-1-1, generate
  5,  25,   5
*Elset, elset=Set-Edge-Right, instance=Part-1-1, generate
  4,  16,   4
*Nset, nset=Set-Edge-Top, instance=Part-1-1, generate
 21,  25,   1
*Elset, elset=Set-Edge-Top, instance=Part-1-1, generate
 13,  16,   1
*Nset, nset=Set-Point-Bottom-Left, instance=Part-1-1
 1,
*Nset, nset=Set-Point-Bottom-Right, instance=Part-1-1
 5,
*Nset, nset=Set-Point-Top-Left, instance=Part-1-1
 21,
*Nset, nset=Set-Point-Top-Right, instance=Part-1-1
 25,
*Nset, nset=_PickedSet16, internal, instance=Part-1-1
 21,
*Elset, elset=_Surf-1_SNEG, internal, instance=Part-1-1, generate
  1,  16,   1
*End Assembly
** ----------------------------------------------------------------
**
** STEP: Step-1
**
*Step, name=Step-1, nlgeom=NO
*Static
1., 1., 1e-05, 1.
**
** BOUNDARY CONDITIONS
**
** Name: BC-1 Type: Displacement/Rotation
*Boundary
Set-Edge-Bottom, 1, 1
** Name: BC-2 Type: Displacement/Rotation
*Boundary
Set-Edge-Right, 1, 1
Set-Edge-Right, 2, 2
** Name: BC-3 Type: Displacement/Rotation
*Boundary
Set-Edge-Top, 4, 4
** Name: BC-4 Type: Displacement/Rotation
*Boundary
Set-Edge-Left, 4, 4
Set-Edge-Left, 5, 5
** Name: BC-5 Type: Displacement/Rotation
*Boundary
_PickedSet16, 1, 1
_PickedSet16, 2, 2
_PickedSet16, 3, 3
_PickedSet16, 4, 4
_PickedSet16, 5, 5
_PickedSet16, 6, 6
